// SBML level 2 version 4

function TNFa_transcription_initiation(kbasal, vA, A, kA)
  kbasal + vA*A/(A + kA);
end

function activated_Transcription__1(k1, k2, Modifier, k3, Modifier2, Modifier3, k4)
  k1 + k2*Modifier + k3*Modifier2 + k4*Modifier3;
end
activated_Transcription__1 is "activated Transcription [1]";

function Catalytic_activation__irrev(substrate, Activator, Kms, V, Ka)
  V*substrate*Activator/((Kms + substrate)*(Ka + Activator));
end
Catalytic_activation__irrev is "Catalytic activation (irrev)";

function Henri_Michaelis_Menten__irreversible(substrate, Km, V)
  V*substrate/(Km + substrate);
end
Henri_Michaelis_Menten__irreversible is "Henri-Michaelis-Menten (irreversible)";

model beuke7()

  // Compartments:
  compartment EL = 2.59e-6;
  compartment LSEC = 4.7e-7;
  compartment MC = 3.5e-7;
  compartment nucleus = 8e-7;
  compartment default = 1.3e-5; default is "cytoplasm";

  // Species:
  species IkBa_cytoplasm in default = 0.4028452;
  species IkBa_mRNA_cytoplasm in default = 6.286329;
  species IkBa_mRNA_nucleus in nucleus = 0.0001571662;
  species IkBa_pre_mRNA_1 in nucleus = 7.181403;
  species IkBa_pre_mRNA_2 in nucleus = 7.181403;
  species JNK in default = 0.9804662;
  species JNK_P in default = 0.0195338;
  species LPS in EL = 5;
  species MSK1 in nucleus = 14.99993;
  species MSK1_P in nucleus = 6.93269e-5;
  species TNFR1_EL in EL = 0.001228346;
  species TNFR1_cytoplasm in default = 5.527559e-5;
  species TNFa_TNFR1_EL in EL = 0; TNFa_TNFR1_EL is "TNFa:TNFR1";
  species TNFa_TNFR1_cytoplasm in default = 0; TNFa_TNFR1_cytoplasm is "TNFa:TNFR1";
  species TNFa_mRNA_LSEC in LSEC = 0;
  species TNFa_mRNA_MC in MC = 0;
  species TNFa_pre_mRNA_LSEC in LSEC = 0;
  species TNFa_pre_mRNA_MC in MC = 0;
  species p38 in default = 0.9296507;
  species p38_P in default = 0.07034926;
  species p65_2P in nucleus = 2.189218e-7;
  species p65_IkBa_nucleus in nucleus = 0.9956521; p65_IkBa_nucleus is "p65-IkBa";
  species p65_cytoplasm in default = 0.0008222262;
  species $p65_mRNA in default = 1;
  species p65_nucleus in nucleus = 0.04110301;
  species IkBa in nucleus = 0.8056902;
  species IKKb in default = 0.2999899;
  species IKKb_p in default = 1.013073e-5;
  species TNFa in EL = 0;
  species p65_IkBa in default = 0.04978469; p65_IkBa is "p65-IkBa";
  species p65_P_default in default = 0.003768856;
  species IkBa_p in default = 0.05667779;
  species p65_P_nucleus in nucleus = 0.1884146;

  // Parameters:
  IKKb_active_phosphorylation_kA = 0.2431463;
  IKKb_active_phosphorylation_kM = 5;
  IKKb_active_phosphorylation_vmax = 277.1039;
  IKKb_basal_phosphoylation_k = 1.023447e-7;
  IKKb_dephopshorylation_k = 0.003030616;
  IkBa_deg_complex_cyt_k = 1e-5;
  IkBa_deg_complex_nuc_k = 1e-5;
  IkBa_deg_cyt_k = 5e-5;
  IkBa_deg_nuc_k = 1e-5;
  IkBa_mRNA_deg_cyt_k = 0.0001923174;
  IkBa_mRNA_deg_nuc_k = 5e-5;
  IkBa_mRNA_transport_k = 0.0001;
  IkBa_nuclear_import_k = 0.005;
  IkBa_p65_association_k = 0.01538897; IkBa_p65_association_k is "IkBa:p65_association_k";
  var IkBa_p65_dissociation_k; IkBa_p65_dissociation_k is "IkBa:p65_dissociation_k";
  IkBa_p65_nuclear_export_k = 0.0001000045; IkBa_p65_nuclear_export_k is "IkBa:p65_nuclear_export_k";
  IkBa_p65_nuclear_import_k = 0.002; IkBa_p65_nuclear_import_k is "IkBa:p65_nuclear_import_k";
  IkBa_p65_phosphorylation_kM = 0.3722921; IkBa_p65_phosphorylation_kM is "IkBa:p65_phosphorylation_kM";
  IkBa_p65_phosphorylation_kcat = 24.05598; IkBa_p65_phosphorylation_kcat is "IkBa:p65_phosphorylation_kcat";
  var IkBa_p65_phosphorylation_vmax; IkBa_p65_phosphorylation_vmax is "IkBa:p65_phosphorylation_vmax";
  IkBa_p_active_degradation_k = 0.003951592;
  IkBa_phosphorylation_kM = 0.1000449;
  IkBa_transcription_elongation_kbasal = 0.002735647;
  IkBa_transcription_initiation_kbasal = 1e-6;
  IkBa_transcription_kA2_p65_P = 0.0001;
  IkBa_transcription_kA3_p65_2P = 0.0001003929;
  IkBa_transcription_kA_p65 = 0.4774818;
  IkBa_translation_Km = 10;
  IkBa_translation_vmax = 0.0006365899;
  JNK_active_phoshorylation_Km = 5.536313;
  JNK_active_phosphorylation_kcat = 42478.02;
  JNK_basal_phosphorylation_k = 1.40201e-5;
  JNK_dephosphorylation_k = 0.0007037154;
  LPS_LSEC_degradation_k = 0.0002813754;
  LPS_MC_degradation_k = 0.000133176;
  MSK1_activation_kM = 0.332175;
  MSK1_dephosphorylation_k = 0.01;
  MSK1_phosphorylation_kcat = 1.007291e-5;
  TNFa_LSEC_transcription_elongation_k = 1e-6;
  TNFa_LSEC_transcription_initiation_kA_LPS = 1.024382;
  TNFa_LSEC_transcription_initiation_kbasal = 0;
  TNFa_LSEC_transcription_initiation_vA_LPS = 1.194383e-5;
  TNFa_LSEC_translation_k = 2.120907e-5;
  TNFa_MC_transcription_elongation_k = 1e-6;
  TNFa_MC_transcription_initiation_kA_LPS = 0.7778474;
  TNFa_MC_transcription_initiation_kbasal = 0;
  TNFa_MC_transcription_initiation_vA_LPS = 5.607063e-6;
  TNFa_MC_translation_k = 2.054553e-6;
  TNFa_degradation_k = 0.0001252637;
  TNFa_mRNA_LSEC_degradation_k = 0.6056947;
  TNFa_mRNA_MC_degradation_k = 0.0541021;
  k_IkBa = 159472;
  k_IkBa_P = 666711.1;
  k_IkBa_mRNA = 4459.194;
  k_JNK_P = 2685090;
  k_MSK_P = 1.174411e10;
  k_TNFR1_outer_membrane2vessicle_shuttle = 1.8e-5;
  k_TNFR1_vessicle2outer_membrane_shuttle = 0.0004;
  k_TNFa_TNFR1_association = 16.833; k_TNFa_TNFR1_association is "k_TNFa:TNFR1_association";
  var k_TNFa_TNFR1_dissociation; k_TNFa_TNFR1_dissociation is "k_TNFa:TNFR1_dissociation";
  k_TNFa_TNFR1_internalisation = 0.00077; k_TNFa_TNFR1_internalisation is "k_TNFa:TNFR1_internalisation";
  k_TNFa_internal_degradation = 6.900762e-5;
  k_p38_P = 899937.8;
  k_p65 = 0.1023721;
  k_p65_P = 2803254;
  p38_active_phoshorylation_Km = 9.996013;
  p38_active_phosphorylation_kcat = 284561.3;
  p38_basal_phosphorylation_k = 8.040345e-5;
  p38_dephosphorylation_k = 0.001062515;
  p65_MSK1_phosphorylation_kM = 0.005503757;
  p65_MSK1_phosphrylation_kcat = 3.187593e-6;
  p65_P_dephosphorylation_k = 0.001857716;
  p65_degradation_k = 1.328912e-5;
  p65_nuclear_import_k = 0.0005;
  p65_translation_k = 1.68e-6;

  // Assignment rules:
  IkBa_p65_phosphorylation_vmax := IkBa_p65_phosphorylation_kcat*IKKb_p;
  p65_2P_dephosphorylation := p65_P_dephosphorylation_k*1;
  IkBa_p65_dissociation_k := IkBa_p65_association_k*0.003;
  scaled_IkBa_mRNA := k_IkBa_mRNA*unscaled_IkBa_mRNA;
  IkBa_nuclear_export_k := IkBa_nuclear_import_k*0.5;
  unscaled_p38_P := default*p38_P;
  k_TNFa_TNFR1_dissociation := k_TNFa_TNFR1_association*1.9e-5;
  unscaled_JNK_P := default*JNK_P;
  p65_P_MSK1_phosphrylation_kcat := p65_MSK1_phosphrylation_kcat*1;
  IkBa_phosphorylation_kcat := IkBa_p65_phosphorylation_kcat;
  IkBa_phosphorylation_vmax := IkBa_phosphorylation_kcat*IKKb_p;
  scaled_IkBa := k_IkBa*unscaled_IkBa;
  unscaled_IkBa_P := IkBa_p*default;
  scaled_IkBa_P := k_IkBa_P*unscaled_IkBa_P;
  scaled_p65 := k_p65*unscaled_p65;
  unscaled_p65_P := nucleus*p65_P_nucleus + default*p65_P_default;
  unscaled_MSK_P := nucleus*MSK1_P;
  p65_MSK1_phosphrylation_vmax := p65_MSK1_phosphrylation_kcat*MSK1_P;
  p65_P_MSK1_phosphrylation_vmax := p65_P_MSK1_phosphrylation_kcat*MSK1_P;
  scaled_p38_P := k_p38_P*unscaled_p38_P;
  p65_P_MSK1_phosphrylation_kM := p65_MSK1_phosphorylation_kM*1;
  scaled_MSK_P := k_MSK_P*unscaled_MSK_P;
  scaled_p65_P := k_p65_P*unscaled_p65_P;
  unscaled_p65 := (p65_P_default + p65_IkBa + p65_cytoplasm)*default + nucleus*(p65_P_nucleus + p65_IkBa_nucleus + p65_nucleus + p65_2P);
  unscaled_IkBa := (IkBa + p65_IkBa_nucleus)*nucleus + (IkBa_p + p65_IkBa + IkBa_cytoplasm)*default;
  p65_nuclear_export_k := p65_nuclear_import_k*0.02;
  scaled_JNK_P := k_JNK_P*unscaled_JNK_P;
  JNK_active_phosphorylation_vmax := JNK_active_phosphorylation_kcat*TNFa_TNFR1_EL;
  p38_active_phosphorylation_vmax := p38_active_phosphorylation_kcat*TNFa_TNFR1_EL;
  unscaled_IkBa_mRNA := IkBa_mRNA_cytoplasm*default + nucleus*IkBa_mRNA_nucleus;
  MSK1_activation_vmax := MSK1_phosphorylation_kcat*p38_P;

  // Reactions:
  Complex_association_c: p65_cytoplasm + IkBa_cytoplasm -> p65_IkBa; default*(IkBa_p65_association_k*IkBa_cytoplasm*p65_cytoplasm - IkBa_p65_dissociation_k*p65_IkBa);
  Complex_degradation_IkBa_c: p65_IkBa => p65_cytoplasm; default*IkBa_deg_complex_cyt_k*p65_IkBa;
  Complex_degradation_IkBa_n: p65_IkBa_nucleus => p65_nucleus; nucleus*IkBa_deg_complex_nuc_k*p65_IkBa_nucleus;
  Complex_degradation_p65_c: p65_IkBa => IkBa_cytoplasm; default*p65_degradation_k*p65_IkBa;
  Complex_degradation_p65_n: p65_IkBa_nucleus => IkBa; nucleus*p65_degradation_k*p65_IkBa_nucleus;
  Complex_nuclear_shuttle: p65_IkBa_nucleus -> p65_IkBa; IkBa_p65_nuclear_export_k*p65_IkBa_nucleus - IkBa_p65_nuclear_import_k*p65_IkBa;
  IKK_phosphorylation: IKKb => IKKb_p; default*Catalytic_activation__irrev(IKKb, TNFa_TNFR1_EL, IKKb_active_phosphorylation_kM, IKKb_active_phosphorylation_vmax, IKKb_active_phosphorylation_kA);  // modifiers: TNFa, TNFa_TNFR1_EL
  IkBa_degradation_c: IkBa_cytoplasm => ; default*IkBa_deg_cyt_k*IkBa_cytoplasm;
  IkBa_degradation_n: IkBa => ; nucleus*IkBa_deg_nuc_k*IkBa;
  IkBa_mRNA_degradation_c: IkBa_mRNA_cytoplasm => ; default*IkBa_mRNA_deg_cyt_k*IkBa_mRNA_cytoplasm;
  IkBa_mRNA_degradation_n: IkBa_mRNA_nucleus => ; nucleus*IkBa_mRNA_deg_nuc_k*IkBa_mRNA_nucleus;
  IkBa_mRNA_transport: IkBa_mRNA_nucleus => IkBa_mRNA_cytoplasm; IkBa_mRNA_transport_k*IkBa_mRNA_nucleus;
  IkBa_nuclear_shuttle: IkBa_cytoplasm -> IkBa; IkBa_nuclear_import_k*IkBa_cytoplasm - IkBa_nuclear_export_k*IkBa;
  IkBa_phosphorylation: IkBa_cytoplasm => IkBa_p; default*Henri_Michaelis_Menten__irreversible(IkBa_cytoplasm, IkBa_phosphorylation_kM, IkBa_phosphorylation_vmax);
  IkBa_transcription_elongation_1: IkBa_pre_mRNA_1 => IkBa_pre_mRNA_2; nucleus*IkBa_transcription_elongation_kbasal*IkBa_pre_mRNA_1;
  IkBa_transcription_elongation_2: IkBa_pre_mRNA_2 => IkBa_mRNA_nucleus; nucleus*IkBa_transcription_elongation_kbasal*IkBa_pre_mRNA_2;
  IkBa_translation: IkBa_mRNA_cytoplasm => IkBa_mRNA_cytoplasm + IkBa_cytoplasm; default*Henri_Michaelis_Menten__irreversible(IkBa_mRNA_cytoplasm, IkBa_translation_Km, IkBa_translation_vmax);
  JNK_active_phosphorylation: JNK => JNK_P; default*Henri_Michaelis_Menten__irreversible(JNK, JNK_active_phoshorylation_Km, JNK_active_phosphorylation_vmax);
  JNK_basal_phosphorylation: JNK => JNK_P; default*JNK_basal_phosphorylation_k*JNK;
  JNK_dephosphorylation: JNK_P => JNK; default*JNK_dephosphorylation_k*JNK_P;
  LPS_LSEC_degradation: LPS => ; EL*LPS_LSEC_degradation_k*LPS;
  LPS_MC_degradation: LPS => ; EL*LPS_MC_degradation_k*LPS;
  MSK1_activation: MSK1 => MSK1_P; nucleus*Henri_Michaelis_Menten__irreversible(MSK1, MSK1_activation_kM, MSK1_activation_vmax);
  MSK1_deactivation: MSK1_P => MSK1; nucleus*MSK1_dephosphorylation_k*MSK1_P;
  TNFR1_shuttle: TNFR1_cytoplasm -> TNFR1_EL; k_TNFR1_vessicle2outer_membrane_shuttle*TNFR1_cytoplasm - k_TNFR1_outer_membrane2vessicle_shuttle*TNFR1_EL;
  TNFa_LSEC_transcription_elongation: TNFa_pre_mRNA_LSEC => TNFa_mRNA_LSEC; LSEC*TNFa_LSEC_transcription_elongation_k*TNFa_pre_mRNA_LSEC;
  TNFa_LSEC_transcription_initiation: => 2 TNFa_pre_mRNA_LSEC; LSEC*TNFa_transcription_initiation(TNFa_LSEC_transcription_initiation_kbasal, TNFa_LSEC_transcription_initiation_vA_LPS, LPS, TNFa_LSEC_transcription_initiation_kA_LPS);  // modifiers: LPS
  TNFa_LSEC_translation: TNFa_mRNA_LSEC => TNFa_mRNA_LSEC + TNFa; TNFa_LSEC_translation_k*TNFa_mRNA_LSEC;
  TNFa_MC_transcription_elongation: TNFa_pre_mRNA_MC => TNFa_mRNA_MC; MC*TNFa_MC_transcription_elongation_k*TNFa_pre_mRNA_MC;
  TNFa_MC_transcription_initiation: => 2 TNFa_pre_mRNA_MC; MC*TNFa_transcription_initiation(TNFa_MC_transcription_initiation_kbasal, TNFa_MC_transcription_initiation_vA_LPS, LPS, TNFa_MC_transcription_initiation_kA_LPS);  // modifiers: LPS
  TNFa_MC_translation: TNFa_mRNA_MC => TNFa_mRNA_MC + TNFa; TNFa_MC_translation_k*TNFa_mRNA_MC;
  TNFa_TNFR1_association: TNFR1_EL + TNFa -> TNFa_TNFR1_EL; EL*(k_TNFa_TNFR1_association*TNFR1_EL*TNFa - k_TNFa_TNFR1_dissociation*TNFa_TNFR1_EL); TNFa_TNFR1_association is "TNFa:TNFR1_association";
  TNFa_TNFR1_internalisation: TNFa_TNFR1_EL => TNFa_TNFR1_cytoplasm; k_TNFa_TNFR1_internalisation*TNFa_TNFR1_EL; TNFa_TNFR1_internalisation is "TNFa:TNFR1_internalisation";
  TNFa_degradation: TNFa => ; EL*TNFa_degradation_k*TNFa;
  TNFa_internal_degradation: TNFa_TNFR1_cytoplasm => TNFR1_cytoplasm; default*k_TNFa_internal_degradation*TNFa_TNFR1_cytoplasm;
  TNFa_mRNA_LSEC_degradation: TNFa_mRNA_LSEC => ; LSEC*TNFa_mRNA_LSEC_degradation_k*TNFa_mRNA_LSEC;
  TNFa_mRNA_MC_degradation: TNFa_mRNA_MC => ; MC*TNFa_mRNA_MC_degradation_k*TNFa_mRNA_MC;
  basal_IKKb_phosphorylation: IKKb => IKKb_p; default*IKKb_basal_phosphoylation_k*IKKb;
  p38_active_phosphorylation: p38 => p38_P; default*Henri_Michaelis_Menten__irreversible(p38, p38_active_phoshorylation_Km, p38_active_phosphorylation_vmax);
  p38_basal_phosphorylation: p38 => p38_P; default*p38_basal_phosphorylation_k*p38;
  p38_dephosphorylation: p38_P => p38; default*p38_dephosphorylation_k*p38_P;
  p65_2P_degradation: p65_2P => ; nucleus*p65_degradation_k*p65_2P;
  p65_2P_dephosphorylation_0: p65_2P => p65_nucleus; nucleus*p65_2P_dephosphorylation*p65_2P;
  p65_P_degradation_c: p65_P_default => ; default*p65_degradation_k*p65_P_default;
  p65_P_degradation_n: p65_P_nucleus => ; nucleus*p65_degradation_k*p65_P_nucleus;
  p65_P_dephosphorylation_c: p65_P_nucleus => p65_nucleus; nucleus*p65_P_dephosphorylation_k*p65_P_nucleus;
  p65_P_dephosphorylation_n: p65_P_default => p65_cytoplasm; default*p65_P_dephosphorylation_k*p65_P_default;
  p65_P_phosphorylation_MSK1: p65_P_nucleus => p65_2P; nucleus*Henri_Michaelis_Menten__irreversible(p65_P_nucleus, p65_P_MSK1_phosphrylation_kM, p65_P_MSK1_phosphrylation_vmax);  // modifiers: MSK1_P
  p65_nuclear_shuttle: p65_cytoplasm -> p65_nucleus; p65_nuclear_import_k*p65_cytoplasm - p65_nuclear_export_k*p65_nucleus;
  p65_phosphorylation_MSK1: p65_nucleus => p65_2P; nucleus*Henri_Michaelis_Menten__irreversible(p65_nucleus, p65_MSK1_phosphorylation_kM, p65_MSK1_phosphrylation_vmax);  // modifiers: MSK1_P
  p65_translation: $p65_mRNA => $p65_mRNA + p65_cytoplasm; default*p65_translation_k*p65_mRNA;
  IkBa_transcription_initiation: => IkBa_pre_mRNA_1; nucleus*activated_Transcription__1(IkBa_transcription_initiation_kbasal, IkBa_transcription_kA2_p65_P, p65_P_nucleus, IkBa_transcription_kA_p65, p65_nucleus, p65_2P, IkBa_transcription_kA3_p65_2P);  // modifiers: p65_P_nucleus, p65_nucleus, p65_2P
  IkBa_p_active_degradation: IkBa_p => ; default*IkBa_p_active_degradation_k*IkBa_p;
  Complex_phosphorylation: p65_IkBa => p65_P_default + IkBa_p; default*Henri_Michaelis_Menten__irreversible(p65_IkBa, IkBa_p65_phosphorylation_kM, IkBa_p65_phosphorylation_vmax);
  dephosphorylation_IKK: IKKb_p => IKKb; default*IKKb_dephopshorylation_k*IKKb_p;
  Complex_association_n: p65_nucleus + IkBa -> p65_IkBa_nucleus; nucleus*(IkBa_p65_association_k*p65_nucleus*IkBa - IkBa_p65_dissociation_k*p65_IkBa_nucleus);
  p65_P_nuclear_shuttle: p65_P_default -> p65_P_nucleus; p65_nuclear_import_k*p65_P_default - p65_nuclear_export_k*p65_P_nucleus;

  // Unit definitions:
  unit volume = 1e-6 litre;
  unit substance = 1e-12 mole;
end
