// SBML level 3 version 1

model callaway1()

  // Compartments:
  compartment default = 1;

  // Species:
  species Cstar in default = 22285.71;
  species T in default = 200000;
  species Tstar in default = 9200;
  species V in default = 50000;

  // Parameters:
  NC = 4.11;
  NT = 100;
  alpha = 0.195;
  c = 13;
  d = 0.01;
  delta = 0.7;
  k = 8e-7;
  kappa = 0.7827;
  lambda = 10000;
  mu = 0.07;

  // Reactions:
  v1: -> T; lambda;
  v10: V -> ; c*V;
  v2: T -> ; d*T;
  v3: T -> ; k*(1 - kappa)*T*V;  // modifiers: V
  v4: -> Tstar; (1 - alpha)*k*(1 - kappa)*T*V;  // modifiers: T, V
  v5: Tstar -> ; delta*Tstar;
  v6: -> Cstar; alpha*k*(1 - kappa)*T*V;  // modifiers: T, V
  v7: Cstar -> ; mu*Cstar;
  v8: -> V; delta*NT*Tstar;  // modifiers: Tstar
  v9: -> V; mu*NC*Cstar;  // modifiers: Cstar
end
