// SBML level 2 version 4

model chance3()

  // Compartments:
  compartment cell = 1;  // GO:0005623

  // Species:
  species E in cell = 1;  // isVersionOf uniprot:P00433 uniprot:P15233 uniprot:P15232 interpro:IPR000823
  species P in cell = 0;  // hasVersion CHEBI:16240 interpro:IPR000823
  species Q in cell = 0;  // CHEBI:15377
  species X in cell = 8;  // CHEBI:16240 kegg.compound:C00027

  // Parameters:
  K2 = 0 dimensionless;
  K3 = 0.5 dimensionless;

  // Reactions:
  r1: X + E -> P; cell*(E*X - K2*P);  // isPartOf ec-code:1.11.1.7
  r2: P => E + Q; cell*K3*P;  // isPartOf ec-code:1.11.1.7 GO:0042744

  // Unit definitions:
  unit substance = dimensionless;
  unit time = dimensionless;
  unit volume = dimensionless;
end
