// SBML level 3 version 1

model clancy1()

  // Compartments:
  compartment cell = 1;

  // Species:
  species c1 in cell = 0;
  species c2 in cell = 0;
  species c3 in cell = 1;
  species i in cell = 0;
  species o in cell = 0.06;

  // Parameters:
  F = 96.485;
  R = 8.314;
  Temp = 310;
  ain = 2.172;
  bin = 1.077;
  ki = 140;
  ko = 5.4;
  vhold = -40;
  vtest = 0;

  // Assignment rules:
  aa := 0.0655*exp(0.05547153*(-36 + v));
  ik := Gk*(v - vk)*o;
  a := 0.0555*exp(0.05547153*(-12 + v));
  b := 0.002357*exp(-0.036588*v);
  Gk := 0.0135*ko^0.59;
  bi := 1.030072*exp(0.000942*v)*(ko^(-1))^0.3;
  u := ai*bb/bi;
  bb := 0.0029357*exp(-0.02158*v);
  vk := R*Temp*ln(ko/ki)/F;
  ai := 1.9755*exp(-0.02352*(25 + v))/ko;
  v := piecewise(vtest, (50 < time) && (time <= 300), vhold);

  // Reactions:
  reaction0000001: c3 -> c2; cell*(-(b*c2) + a*c3);
  reaction0000002: c2 -> c1; cell*(-(bin*c1) + ain*c2);
  reaction0000003: c1 -> o; cell*(aa*c1 - bb*o);
  reaction0000004: o -> i; cell*(-(ai*i) + bi*o);
  reaction0000005: c1 -> i; cell*(aa*c1 - u*i);
end
