// SBML level 2 version 4

model panteleev2()

  // Compartments:
  compartment compartment = 1;

  // Species:
  species TFPI in compartment = 2.399999;  // uniprot:P10646
  species VIIa_TF in compartment = 0.9999997;  // hasPart uniprot:P13726 uniprot:P08709
  species VIIa_TF_X in compartment = 0;  // hasPart uniprot:P00742 uniprot:P13726 uniprot:P08709
  species VIIa_TF_Xa in compartment = 0;  // hasPart uniprot:P00742 uniprot:P13726 uniprot:P08709
  species VIIa_TF_Xa_TFPI in compartment = 0;  // hasPart uniprot:P10646 uniprot:P00742 uniprot:P13726 uniprot:P08709
  species X in compartment = 169.9999;  // uniprot:P00742
  species Xa in compartment = 0;  // uniprot:P00742
  species Xa_TFPI in compartment = 0;  // hasPart uniprot:P10646 uniprot:P00742
  species Xa_TFPI_VIIa_TF in compartment = 0;  // hasPart uniprot:P13726 uniprot:P08709 uniprot:P10646 uniprot:P00742

  // Reactions:
  reaction_1: VIIa_TF + X -> VIIa_TF_X; compartment*(reaction_1_k1*X*VIIa_TF - reaction_1_k2*VIIa_TF_X);
    reaction_1_k2 = 770; reaction_1_k1 = 5;
  reaction_2: VIIa_TF_X => VIIa_TF_Xa; compartment*reaction_2_k1*VIIa_TF_X;
    reaction_2_k1 = 420;
  reaction_3: VIIa_TF_Xa -> VIIa_TF + Xa; compartment*(reaction_3_k1*VIIa_TF_Xa - reaction_3_k2*Xa*VIIa_TF);
    reaction_3_k2 = 5; reaction_3_k1 = 770;
  reaction_4: TFPI + Xa -> Xa_TFPI; compartment*(reaction_4_k1*Xa*TFPI - reaction_4_k2*Xa_TFPI);
    reaction_4_k2 = 0.02; reaction_4_k1 = 0.054;
  reaction_5: Xa_TFPI + VIIa_TF -> Xa_TFPI_VIIa_TF; compartment*(reaction_5_k1*VIIa_TF*Xa_TFPI - reaction_5_k2*Xa_TFPI_VIIa_TF);
    reaction_5_k2 = 0.066; reaction_5_k1 = 0.44;
  reaction_6: TFPI + VIIa_TF_Xa -> VIIa_TF_Xa_TFPI; compartment*(reaction_6_k1*VIIa_TF_Xa*TFPI - reaction_6_k2*VIIa_TF_Xa_TFPI);
    reaction_6_k2 = 0; reaction_6_k1 = 10;
  reaction_7: VIIa_TF_Xa_TFPI -> Xa_TFPI + VIIa_TF; compartment*(reaction_7_k1*VIIa_TF_Xa_TFPI - reaction_7_k2*VIIa_TF*Xa_TFPI);
    reaction_7_k2 = 0; reaction_7_k1 = 0;
  reaction_8: VIIa_TF_Xa_TFPI -> Xa_TFPI_VIIa_TF; compartment*(reaction_8_k1*VIIa_TF_Xa_TFPI - reaction_8_k2*Xa_TFPI_VIIa_TF);
    reaction_8_k2 = 0; reaction_8_k1 = 0;

  // Unit definitions:
  unit substance = 1e-9 mole;
  unit time = 60 second;
end
